// house1.glm
object triplex_meter {
    name meter_house1;
    parent shared_node;
    phases CS;
    nominal_voltage 120;

    object recorder {
        property measured_voltage_1, measured_voltage_2, measured_current_1, measured_current_2, measured_real_power, measured_power;
        interval 60;
        file "${H1_METER_OUT}";
    };

    object triplex_load {
        name load_house1;
        phases CS;
        nominal_voltage 120;

        power_fraction_12 ${P_FRAC};
        impedance_fraction_12 ${Z_FRAC};
        current_fraction_12 ${I_FRAC};
        power_pf_12 ${PF_VAL};
        current_pf_12 ${PF_VAL};
        impedance_pf_12 ${PF_VAL};

        object player {
            property base_power_12[${DEMAND_UNIT}];
            file "${H1_DEMAND_IN}";
        };
    };

    object waterheater {
        name wh_house1;
        location ${WH_LOCATION};
        temperature ${WH_SETPOINT};
        tank_setpoint ${WH_SETPOINT};
        tank_volume ${WH_VOL};
        thermostat_deadband ${WH_DEADBAND};
        heating_element_capacity ${WH_CAPACITY} kW;
        inlet_water_temperature ${WH_INLET};
        tank_UA ${WH_UA};

        object player {
            property water_demand; // gpm
            file "${H1_WATER_IN}";
        };

        object recorder {
            property temperature, actual_load, water_demand;
            interval 60;
            file "${H1_WH_OUT}";
        };
    };
}
